freq[0] := 6  # disabled
freq[0] := 1000
amp[0] := 10
NS := 100000
NF := 11
freq[1] := 60  # disabled
freq[1] := 1500
amp[1] := 10
dfreq := 200000
freq[2] := 80  # disabled
freq[2] := 2000
amp[2] := 0
dtime := 1/dfreq = 5e-6
freq[3] := 100  # disabled
freq[3] := 3000
amp[3] := 10
dn := dfreq/NS = 2
freq[4] := 200  # disabled
freq[4] := 4000
amp[4] := 0
i := 0, 1 .. NS
freq[5] := 300  # disabled
freq[5] := 5000
amp[5] := 0
ns[i] := 0 + i
freq[6] := 400  # disabled
freq[6] := 6000
amp[6] := 10
time[i] := ns[i]*dtime
freq[7] := 500  # disabled
freq[7] := 7000
amp[7] := 0
freq[8] := 600  # disabled
freq[8] := 8000
amp[8] := 0
freq[9] := 800  # disabled
freq[9] := 9000
amp[9] := 10
freq[10] := 1000  # disabled
freq[10] := 10000
amp[10] := 0
f(x) := sum(amp[i]*(cos(2*π*freq[i]*x) + 1), i = 0 .. NF - 1)
s[i] := f(time[i])
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# D:\Desktop\Study_now\SRW\GoertzelAlgorithm\src\sim\data\sample.csv
sc := ceil(s)
sum(ceil(s[i]), i = 0 .. NS)/NS = 50.4785
s =  # no stored result
sc =  # no stored result
S(freq) :=
    k ← freq/dn
    alpha ← 2*cos(2*π*k/NS)
    Wre ← cos(2*π*k/NS)
    Wim ← sin(2*π*k/NS)
    vm1 ← 0
    vm2 ← 0
    for iii ∈ 0, 1 .. NS - 1
        scp[iii] ← sc[iii]*13/256
        v[iii] ← scp[iii] + alpha*vm1 - vm2 if iii == 0
        v[iii] ← scp[iii] + alpha*v[iii - 1] - vm1 if iii == 1
        v[iii] ← scp[iii] + alpha*v[iii - 1] - v[iii - 2] otherwise
        iii ← iii + 1
    vWre ← v[NS - 2]*Wre
    vWim ← v[NS - 2]*Wim
    S ← (vWre - v[NS - 3])^2 + vWim^2
    M[0] ← S
    M[1] ← v
    M[2] ← Wre
    M[3] ← Wim
    M[4] ← vWre
    M[5] ← vWim
    return M
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sin(2*π*500/1000) = 1.22461e-16
k := 9
SS := S(freq[k])
freq[k] = 9000
10574000
SS[2] = 0.960294
10749000
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SS[3] = 0.278991
10966000/3098600 = 3.53902
2*SS[2] = 1.92059
10966000/589940 = 18.5883
SS[1] =  # no stored result
SS[4] = -24397.3
SS[5] = -7088.06
42725000/10966000 = 3.89613
SS[4] - SS[1][NS - 3] = 24392.2
cos(2*π*freq/(2*NS)) = [0.999507; 0.99889; 0.998027; 0.995562; 0.992115; 0.987688; 0.982287; 0.975917; 0.968583; 0.960294; 0.951057]
sin(2*π*freq/(2*NS)) = [0.0314108; 0.0471065; 0.0627905; 0.0941083; 0.125333; 0.156434; 0.187381; 0.218143; 0.24869; 0.278991; 0.309017]
2*cos(2*π*freq/(2*NS)) = [1.99901; 1.99778; 1.99605; 1.99112; 1.98423; 1.97538; 1.96457; 1.95183; 1.93717; 1.92059; 1.90211]
π*0.2 = 0.628319
freq/NS = [0.01; 0.015; 0.02; 0.03; 0.04; 0.05; 0.06; 0.07; 0.08; 0.09; 0.1]
2*π*200/(2*NS) = 0.00628319
cos(0.628319) = 0.809017
2*π*600/(2*NS) = 0.0188496
cos(1.884956) = -0.309017
2*π*600/(2*NS) - π/2 = -1.55195
-sin(0.314159) = -0.309017
